f0 := 9*10^9
RA := 50
lф := 2.5
τи := 1*10^-6
Pc := 1*10^-13
Dвх := 50
Dвых := 6
Slz := 36
δf/f0 = 10^-4  # disabled
Uвых := 6
τф := 0.2*τи = 2e-7
Δ := 0.05
qвых := 5
Tmin := -10
Tmax := 60
δfg := f0*10^-4 = 900000
δfc := f0*10^-5 = 90000
Пнс := 2*sqrt(δfc^2 + δfg^2) = 1808978
Δfд := (5500*f0)/(3*10^8) = 165000
Пс := 1.37/τи = 1370000
П := Пс + 2*Δfд + Пнс = 3508978
fп := 60*10^6
TA := 110
T0 := 290
k := 1.38*10^-23
Пш := 1.1*П = 3859875
qвх := 3
Nд1 := Pc/(qвх*k*T0*Пш)*(-(TA/T0 - 1)) = 1.33938
βф := 0.011
KPф := 10^(-0.1*βф*lф) = 0.993688
Nд2 := KPф*Nд1 = 1.33092
Nмшу := 1.3
KPмшу := 100
KPвц := 0.9
Nсм := 0.5
KPсм := 0.8
Nупч := 0.5
N0 := 1/(KPвц*KPф)*(Nмшу + (Nсм - 1)/KPмшу + (Nупч - 1)/(KPмшу*KPсм)) = 1.44104
dэр := 0.003
ξзк := 4*fп/f0*(f0 + fп)/(f0 + 2*fп)/dэр = 8.83041
fгр := 1100*10^6
ω := 2*3.14*fп = 376800000
h21э := 120
Ск := 1.2*10^-12
β := h21э
τк := 7*10^-12
Uкэ := 5
Iк := 10*10^-3
ξ := 6
j := sqrt(-1)
rб := ξ*τк/Ск = 35
α0 := h21э/(1 + h21э) = 0.991736
# β | ξ | τ
rэ := 25.6*α0/(Iк*10^3) = 2.53884
h11б := rэ + rб/h21э = 2.83051
fs := fгр*h11б/rб = 88958874
g11 := (1 + β*fп*fгр^-1*fп*fs^-1)/(β*h11б*(1 + (fп*fs^-1)^2)) = 0.010957
b11 := (β*fп*fгр^-1 - fп*fs^-1)/(β*h11б*(1 + (fп*fs^-1)^2)) = 0.0118804
Y11 := g11 + j*b11 = 0.010957 + 0.0118804i
|Y11| = 0.016  # error: Значение должно быть матрицей со скалярными элементами.
g12 := -ω*τк*(β*fп*fгр^-1 - fп*fs^-1)/(β*h11б*(1 + (fп*fs^-1)^2)) = -3.13356e-5
b12 := -ω*Ск + ω*τк*(1 + β*fп*fгр^-1*fп*fs^-1)/(β*h11б*(1 + (fп*fs^-1)^2)) = -0.00042326
Y12 := g12 + j*b12 = -3.13356e-5 - 0.00042326i
|Y12| = 4.246*10^-4  # error: Значение должно быть матрицей со скалярными элементами.
g21 := β/((1 + β)*h11б*(1 + (fп*fs^-1)^2)) = 0.240822
b21 := -β*(fп*fs^-1)/((1 + β)*h11б*(1 + (fп*fs^-1)^2)) = -0.162427
Y21 := g21 + j*b21 = 0.240822 - 0.162427i
|Y21| □ □ = 0.29  # error: Необходим оператор.
g22 := ω*τк*fп*fs^-1/(h11б*(1 + (fп*fs^-1)^2)) = 0.000431987
b22 := ω*Ск + ω*τк/(h11б*(1 + (fп*fs^-1)^2)) = 0.00109264
Y22 := g22 + j*b22 = 0.000431987 + 0.00109264i
|Y22| = 1.176*10^-3  # error: Значение должно быть матрицей со скалярными элементами.
KpСМ := 0.1
PвхУПЧ := KPвц*KPмшу*KpСМ*Pc = 9e-13
UвхУПЧ := sqrt(2*PвхУПЧ/g11) = 1.28171e-5
UвыхУПЧ := 1
Kз := 2
Kуст := 10.985
Kопт := Kз*UвыхУПЧ/UвхУПЧ = 156042
mк := log(Kопт)/log(Kуст) = 4.98966
UвхДет := 1
Ri := 45
См := 3*10^-12
Сд := 10^-12
Cн := 10*Сд - См = 7e-12
Rн := τи/(2.3*(10*Сд)) = 43478.3
Rн/Ri = 966.184
Rн*Cн = 3.04348e-7
2/fп = 3.33333e-8
Кд := 0.97
Kву := Uвых/(Кд*UвхДет) = 6.18557
